<?xml version="1.0" encoding="UTF-8"?>
<neuroml
  xmlns="http://www.neuroml.org/schema/neuroml2"
  xmlns:xs="http://www.w3.org/2001/XMLSchema"
  xmlns:xsi="http://www.w3.org/2001/XMLSchema-instance"
  xsi:schemaLocation="http://www.neuroml.org/schema/neuroml2
  https://raw.github.com/NeuroML/NeuroML2/development/Schemas/NeuroML2/NeuroML_v2beta5.xsd"
  id="NeuroML2_file_exported_from_NEURON">

  <notes>
  </notes>

  <include href="vNeuron_Sensor.cell.nml"></include>

  <expTwoSynapse id="exc_syn_1conns" erev="0mV" gbase="25nS" tauDecay="10ms" tauRise="1ms"/>

  <pulseGenerator id="constant_hyperpolarizing_current" delay="0ms" duration="20s" amplitude="-70pA"/>
  <pulseGenerator id="transient_pulse_current" delay="700ms" duration="2000ms" amplitude="180pA"/>

  <iafCell id="iafNeuron_Sensor" reset="-70mV" C="0.4nF" thresh="-50mV" leakConductance="0.02uS" leakReversal="-70mV"/>
  <iafCell id="iafNeuron_Motor" reset="-70mV" C="0.4nF" thresh="-50mV" leakConductance="0.02uS" leakReversal="-70mV"/>

  <!--include href="Leak.channel.nml"/>
  <include href="k_slow.channel.nml"/>
  <include href="k_fast.channel.nml"/>
  <include href="ca_boyle.channel.nml"/-->

  <include href="vNeuron_Motor.cell.nml"/>

  <network id="network" type="networkWithTemperature" temperature="34 degC">
      <population id="iafPop_Sensor" component="iafNeuron_Sensor" size="15" type="populationList">
          <instance id="0">
              <location x="-50" y="100" z="0"/>
          </instance>
          <instance id="1">
              <location x="-20" y="130" z="-30"/>
          </instance>
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      </population>

      <population id="vPop_Sensor" component="vNeuron_Sensor" size="15" type="populationList">
          <instance id="0">
              <location x="-50" y="60" z="0"/>
          </instance>
          <instance id="1">
              <location x="-20" y="90" z="-30"/>
          </instance>
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
      </population>

      <population id="iafPop_Motor" component="iafNeuron_Motor" size="3" type="populationList">
          <instance id="0">
              <location x="20" y="45" z="10"/>
          </instance>
          <instance id="1">
              <location x="-20" y="45" z="10"/>
          </instance>
          <instance id="2">
              <location x="0" y="45" z="-20"/>
          </instance>
      </population>

      <population id="vPop_Motor" component="vNeuron_Motor"  size="3" type="populationList">
          <instance id="0">
              <location x="20" y="-40" z="10"/>
          </instance>
          <instance id="1">
              <location x="-20" y="-40" z="10"/>
          </instance>
          <instance id="2">
              <location x="0" y="-40" z="-20"/>
          </instance>
      </population>

      <projection id="proj_iafSensor_to_iafMotor" postsynapticPopulation="iafPop_Motor" presynapticPopulation="iafPop_Sensor" synapse="exc_syn_1conns">
        <connection preCellId="../iafPop_Sensor/0/iafNeuron_Sensor" postCellId="../iafPop_Motor/0/iafNeuron_Motor" id="0"/>
        <connection preCellId="../iafPop_Sensor/1/iafNeuron_Sensor" postCellId="../iafPop_Motor/0/iafNeuron_Motor" id="1"/>
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      </projection>

      <projection id="proj_iSensor_to_vSensor" postsynapticPopulation="vPop_Sensor" presynapticPopulation="iafPop_Sensor" synapse="exc_syn_1conns">
        <connection preCellId="../iafPop_Sensor/0/iafNeuron_Sensor" postCellId="../vPop_Sensor/0/vNeuron_Sensor" id="0"/>
        <connection preCellId="../iafPop_Sensor/1/iafNeuron_Sensor" postCellId="../vPop_Sensor/1/vNeuron_Sensor" id="1"/>
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      </projection>

      <projection id="proj_iMotor_to_vMotor" postsynapticPopulation="vPop_Motor" presynapticPopulation="iafPop_Motor" synapse="exc_syn_1conns">
        <connection preCellId="../iafPop_Motor/0/iafNeuron_Motor" postCellId="../vPop_Motor/0/vNeuron_Motor" id="0"/>
        <connection preCellId="../iafPop_Motor/1/iafNeuron_Motor" postCellId="../vPop_Motor/1/vNeuron_Motor" id="1"/>
        <connection preCellId="../iafPop_Motor/2/iafNeuron_Motor" postCellId="../vPop_Motor/2/vNeuron_Motor" id="2"/>
      </projection>

      <inputList id="hyp_input" population="vPop_Sensor" component="constant_hyperpolarizing_current">
          <input id="0" target="../vPop_Sensor/0/vNeuron_Sensor" destination="synapses"/>
      </inputList>

      <inputList id="step_input" population="vPop_Sensor" component="transient_pulse_current">
          <input id="0" target="../vPop_Sensor/0/vNeuron_Sensor" destination="synapses"/>
      </inputList>
  </network>
</neuroml>
